t := 1.11
b := sqrt((t + 1)/t)
a := ln(b*t) + 2
b = 1.37873
a = 2.42552
ω(t) := e^(-a*b*t)*tan(b*t)^3/(1 + cos(a*t))
ω(t) = 3726.13
x := 2, 2.05 .. 3
y(x) := sin(x)
x = [2; 2.05; 2.1; 2.15; 2.2; 2.25; 2.3; 2.35; 2.4; 2.45; 2.5; 2.55; 2.6; 2.65; 2.7; 2.75; 2.8; 2.85; 2.9; 2.95; 3]
y(x) = [0.909297; 0.887362; 0.863209; 0.836899; 0.808496; 0.778073; 0.745705; 0.711473; 0.675463; 0.637765; 0.598472; 0.557684; 0.515501; 0.472031; 0.42738; 0.381661; 0.334988; 0.287478; 0.239249; 0.190423; 0.14112]
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x :=
    x[0] ← 2
    for i ∈ 0 .. 19
        x[i + 1] ← x[i] + 0.05
    x
y(x) := sin(x)
i := 0 .. 19
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y(x[i]) = [0.909297; 0.887362; 0.863209; 0.836899; 0.808496; 0.778073; 0.745705; 0.711473; 0.675463; 0.637765; 0.598472; 0.557684; 0.515501; 0.472031; 0.42738; 0.381661; 0.334988; 0.287478; 0.239249; 0.190423]
x[i] = [2; 2.05; 2.1; 2.15; 2.2; 2.25; 2.3; 2.35; 2.4; 2.45; 2.5; 2.55; 2.6; 2.65; 2.7; 2.75; 2.8; 2.85; 2.9; 2.95]
x :=
    x[0] ← 0
    for i ∈ 0 .. 19
        x[i + 1] ← x[i] + 0.05
    x
y(x) := acos(x) - sqrt(1 - 0.3*x^3)
i := 0 .. 19
x = [0; 0.05; 0.1; 0.15; 0.2; 0.25; 0.3; 0.35; 0.4; 0.45; 0.5; 0.55; 0.6; 0.65; 0.7; 0.75; 0.8; 0.85; 0.9; 0.95; 1]
y(x) = [0.570796; 0.520794; 0.470779; 0.420734; 0.370639; 0.320463; 0.270162; 0.219677; 0.168926; 0.117794; 0.0661267; 0.0137078; -0.0397622; -0.094709; -0.151755; -0.211845; -0.276499; -0.348385; -0.432885; -0.544291; -0.83666 + 2.10734e-8i]
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A := [5.8, 4.8, 4.7, 5.3; 4.7, 4.9, 6.6, -2.2; 7.2, 6.4, 3.5, 5.4; 9.2, 8.2, 8.8, 1.9]
B := [-9.1; -8.1; -3.4; -5.1]
x := lsolve(A, B)
x = [13.2562; -10.6844; -3.79544; -3.18154]
x1 := 0
x2 := 0
x3 := 0
x4 := 0
Given
5.8*x1 + 4.8*x2 + 4.7*x3 + 5.3*x4 == -9.1
4.7*x1 + 4.9*x2 + 6.6*x3 - 2.2*x4 == -8.1
7.2*x1 + 6.4*x2 + 3.5*x3 + 5.4*x4 == -3.4
9.2*x1 + 8.2*x2 + 8.8*x3 + 1.9*x4 == -5.1
[x1; x2; x3; x4] := Find(x1, x2, x3, x4)
x1 = 13.2562
x2 = -10.6844
x3 = -3.79544
x4 = -3.18154
