ORIGIN ≡ 1
n := 15
i := 1 .. n
x[i] := -0.9 + (i - 1)*0.1
y := conj(READFILE("data6.txt", "delimited"))
a0 := intercept(x, y)
a1 := slope(x, y)
a0 = 5.89421
a1 = 2.03939
yr[i] := a0 + a1*x[i]
σ := sqrt(1/(n - 2)*sum((y[i] - yr[i])^2, i = 1 .. n))
σ = 0.398054
σ_norm_count := 5
j := 1 .. σ_norm_count
MPE := [1, 1; 1, -1]
σ_norm := [0.3981]
get_percents(y_stat) :=
    count_σ ← 0
    count_2σ ← 0
    for i ∈ 1 .. rows(y_stat)
        for j ∈ 1 .. cols(y_stat)
            y_ ← MPE[i, 1]*a0 + MPE[i, 2]*a1
            count_σ ← count_σ + 1 if |y_ - y_stat[i, j]| ≤ σ
            count_2σ ← count_2σ + 1 if |y_ - y_stat[i, j]| ≤ 2*σ
    v[1] ← round(count_σ/(rows(y_stat)*cols(y_stat))*100)
    v[2] ← round(count_2σ/(rows(y_stat)*cols(y_stat))*100)
    v
k := 60
na := 2
y_stat :=
    m ← 0
    while 1
        for i ∈ 1 .. k
            m ← mod(m + 1, rows(σ_norm))
            rand_effects[:, i] ← rnorm(na, 0, σ_norm[m + 1])
        for j ∈ 1 .. k
            for i ∈ 1 .. na
                v[i, j] ← MPE[i, 1]*a0 + MPE[i, 2]*a1 + rand_effects[i, j]
        percents ← get_percents(v)
        if percents[1] == 67 and percents[2] == 95
            {
                break
            }
    v
y_stat = [
    8.66379, 7.63282, 8.41172, 6.78592, 7.57389, 7.25438, 8.46036, 8.34622, 8.27214, 7.6161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;
    4.27535, 3.39791, 3.59135, 4.0374, 3.7875, 3.71086, 3.69108, 3.62346, 3.35947, 4.09741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]
yb := [7.933605; 3.854819]
Sab(yt, σ) :=
    A ← 0
    for i ∈ 1 .. 2
        for j ∈ 1 .. 60
            A ← if(|yt[i, j] - yb[i]| ≤ σ, A + 1, A)
        A
    A/(60*2)*100
get_percents(y_stat) = [67; 95]
Sab(y_stat, σ) = 66.6667
Sab(y_stat, 2*σ) = 95
WRITEEXCEL(y_stat, "ry4.xlsx") = [
    8.66379, 7.63282, 8.41172, 6.78592, 7.57389, 7.25438, 8.46036, 8.34622, 8.27214, 7.6161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;
    4.27535, 3.39791, 3.59135, 4.0374, 3.7875, 3.71086, 3.69108, 3.62346, 3.35947, 4.09741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]
