ORIGIN ≡ 1
n := 15
i := 1 .. n
x[i] := -0.9 + (i - 1)*0.1
y := conj(READFILE("data6.txt", "delimited"))
a0 := intercept(x, y)
a1 := slope(x, y)
a0 = 5.89421
a1 = 2.03939
yr[i] := a0 + a1*x[i]
σ := sqrt(1/(n - 2)*sum((y[i] - yr[i])^2, i = 1 .. n))
σ = 0.398054
k := 4
σ_norm_count := 4
j := 1 .. σ_norm_count
σ_norm := [0.3978; 0.3979; 0.3981; 0.3982]
get_percents(y_stat) :=
    count_σ ← 0
    count_2σ ← 0
    for i ∈ 1 .. n
        count_σ ← count_σ + 1 if |yr[i] - y_stat[i]| ≤ σ
        count_2σ ← count_2σ + 1 if |yr[i] - y_stat[i]| ≤ 2*σ
    v[1] ← round(count_σ/n*100)
    v[2] ← round(count_2σ/n*100)
    v
y_stat :=
    m ← 0
    for j ∈ 1 .. k
        while 1
            m ← mod(m + 1, σ_norm_count)
            rand_effects ← rnorm(n, 0, σ_norm[m + 1])
            for i ∈ 1 .. n
                y_stat[i] ← yr[i] + rand_effects[i]
            percents ← get_percents(y_stat)
            break if percents[1] == 67 and percents[2] == 93
        result[:, j] ← y_stat
    result
y_stat = [
    4.85818, 4.58913, 4.07357, 4.88794;
    4.45384, 4.3257, 4.08971, 3.58009;
    4.53028, 3.80723, 4.2626, 4.47708;
    4.65232, 5.21052, 4.29873, 5.1562;
    5.29118, 4.98897, 5.2973, 4.23308;
    5.11686, 5.28305, 4.98804, 4.88138;
    5.10858, 5.37126, 6.27803, 4.83027;
    5.50332, 5.77587, 5.5213, 5.64793;
    5.59522, 5.63711, 6.00906, 5.4238;
    6.47747, 5.53349, 5.16666, 5.77765;
    6.58465, 5.91877, 5.96953, 6.06482;
    6.16449, 6.93484, 6.42211, 6.30846;
    6.93599, 5.67807, 6.02585, 6.55507;
    6.45858, 6.80778, 6.38973, 6.81764;
    6.80283, 6.80455, 6.17771, 6.69928
]
A1 :=
    A ← 0
    for i ∈ 1 .. 15
        A ← if(|y_stat[:, 1][i] - yr[i]| ≤ 2*σ, A + 1, A)
    A/n*100
A1 = 93.3333
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