ORIGIN := 1
N := 15
i := 1 .. N
y := conj(READFILE("data6.txt", "delimited"))
x[i] := -0.9 + (i - 1)*0.1
a0 := intercept(x, y)
a0 = 5.89421
a1 := slope(x, y)
a1 = 2.03939
yr[i] := a0 + a1*x[i]
σ := sqrt(1/(N - 2)*sum((y[i] - yr[i])^2, i = 1 .. N))
σ = 0.398054
n := 2
k := 1
NA := n^k = 2  # Акт
NN := 60
NP := NA*NN = 120
i := 1 .. NA
X := [1, 1; 1, -1]
j := 1 .. NN
yb[i] := a0*X[i, 1] + a1*X[i, 2]
yb = [7.9336; 3.85482]
ε1 := rnorm(NP, 0, 0.3978)
ry1[i, j] := yb[i] + ε1[j + (NN*(i - 1))]
ry1 := READEXCEL("Z:\labs\11\data\act\ry1.xlsx")
ε2 := rnorm(NP, 0, 0.3979)
ry2[i, j] := yb[i] + ε2[j + (NN*(i - 1))]
ry2 := READEXCEL("Z:\labs\11\data\act\ry2.xlsx")
ε3 := rnorm(NP, 0, 0.3981)
ry3[i, j] := yb[i] + ε3[j + (NN*(i - 1))]
ry3 := READEXCEL("Z:\labs\11\data\act\ry3.xlsx")
ε4 := rnorm(NP, 0, 0.3982)
ry4[i, j] := yb[i] + ε4[j + (NN*(i - 1))]
ry4 := READEXCEL("Z:\labs\11\data\act\ry4.xlsx")
Sab(yt, σ) :=
    A ← 0
    for i ∈ 1 .. n
        for j ∈ 1 .. NN
            A ← if(|yt[i, j] - yb[i]| ≤ σ, A + 1, A)
        A
    A/NP*100
ry1 = [
    8.47562, 8.22021, 8.07502, 8.0247, 7.23316, 8.259, 7.86646, 8.70003, 8.26042, 7.92279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;
    3.42308, 4.10649, 3.60258, 4.35616, 3.84493, 4.75467, 3.98713, 3.64659, 2.85885, 3.0994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]
ry2 = [
    8.66361, 7.6329, 8.4116, 6.78621, 7.57398, 7.25455, 8.46023, 8.34612, 8.27206, 7.61618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;
    4.27524, 3.39802, 3.59142, 4.03736, 3.78752, 3.71089, 3.69112, 3.62352, 3.3596, 4.09735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]
Sab(ry1, σ) = 66.6667
Sab(ry3, σ) = 66.6667
Sab(ry2, σ) = 66.6667
Sab(ry4, σ) = 66.6667
ry3 = [
    8.45253, 8.18385, 8.29694, 8.09312, 8.0395, 7.26328, 8.19018, 8.43346, 7.45261, 8.78632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;
    4.36178, 3.75115, 4.202, 4.31432, 3.90889, 3.88614, 4.4197, 3.72573, 4.07892, 3.48194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]
Sab(ry1, 2*σ) = 95
Sab(ry3, 2*σ) = 95
Sab(ry2, 2*σ) = 95
Sab(ry4, 2*σ) = 95
ry4 = [
    8.47589, 8.22021, 8.07499, 8.02477, 7.23281, 8.259, 7.86648, 8.7006, 8.26059, 7.92279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;
    3.42286, 4.10649, 3.60264, 4.35654, 3.84492, 4.75467, 3.9871, 3.64643, 2.85835, 3.0994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]
XX := [1; -1]
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b0(ryt) := sum(sum(ryt[i, j], j = 1 .. NN), i = 1 .. NA)/NP
b1(ryt) := sum(sum(X[i, 2]*ryt[i, j], j = 1 .. NN), i = 1 .. NA)/NP
b0(ry1) = 5.9198
b1(ry1) = 2.06869
b0(ry2) = 5.84812
b1(ry2) = 2.0555
b0(ry3) = 5.98543
b1(ry3) = 2.047
b0(ry4) = 5.9198
b1(ry4) = 2.06871
f_y(ryt) := b0(ryt) + b1(ryt)*x
y1 := f_y(ry1)
y3 := f_y(ry3)
y2 := f_y(ry2)
y4 := f_y(ry3)
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ryS := stack(ry1, ry2, ry3, ry4)
yS := stack(y1, y2, y3, y4)
yrS := stack(yr, yr, yr, yr)
n := 4
NT := rows(yS)
NT = 60
α := 0.05
qvF := qF(1 - α, 2, NT - 2)
qvF = 3.15593
Ymean := mean(yr)
sm2 := 1/(NT - 2)*sum((yS[j] - yrS[j])^2, j)
sm2 = 0.00495091
sy2 := 1/(NP*n - n*NN)*sum(sum((ryS[i, j] - yb[i])^2, j), i)
sy2 = 0.089773
f := sm2/sy2
f = 0.0551492
ry1 = [
    8.47562, 8.22021, 8.07502, 8.0247, 7.23316, 8.259, 7.86646, 8.70003, 8.26042, 7.92279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;
    3.42308, 4.10649, 3.60258, 4.35616, 3.84493, 4.75467, 3.98713, 3.64659, 2.85885, 3.0994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]
ryS = [
    8.47562, 8.22021, 8.07502, 8.0247, 7.23316, 8.259, 7.86646, 8.70003, 8.26042, 7.92279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;
    3.42308, 4.10649, 3.60258, 4.35616, 3.84493, 4.75467, 3.98713, 3.64659, 2.85885, 3.0994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;
    8.66361, 7.6329, 8.4116, 6.78621, 7.57398, 7.25455, 8.46023, 8.34612, 8.27206, 7.61618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;
    4.27524, 3.39802, 3.59142, 4.03736, 3.78752, 3.71089, 3.69112, 3.62352, 3.3596, 4.09735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;
    8.45253, 8.18385, 8.29694, 8.09312, 8.0395, 7.26328, 8.19018, 8.43346, 7.45261, 8.78632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;
    4.36178, 3.75115, 4.202, 4.31432, 3.90889, 3.88614, 4.4197, 3.72573, 4.07892, 3.48194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;
    8.47589, 8.22021, 8.07499, 8.02477, 7.23281, 8.259, 7.86648, 8.7006, 8.26059, 7.92279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;
    3.42286, 4.10649, 3.60264, 4.35654, 3.84492, 4.75467, 3.9871, 3.64643, 2.85835, 3.0994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]
