ORIGIN := 1
N := 15
i := 1 .. N
y := conj(READFILE("data6.txt", "delimited"))
x[i] := -0.9 + (i - 1)*0.1
a0 := intercept(x, y)
a0 = 5.89421
a1 := slope(x, y)
a1 = 2.03939
yr[i] := a0 + a1*x[i]
y = [3.911; 3.893; 4.704; 4.993; 4.935; 5.477; 5.384; 5.489; 5.202; 5.714; 6.524; 5.348; 6.516; 7.136; 7.069]
x = [-0.9; -0.8; -0.7; -0.6; -0.5; -0.4; -0.3; -0.2; -0.1; 0; 0.1; 0.2; 0.3; 0.4; 0.5]
σ := sqrt(1/(N - 2)*sum((y[i] - yr[i])^2, i = 1 .. N))
σ = 0.398054
ε1 := rnorm(N, 0, 0.3978)
y1 := yr + ε1
ε2 := rnorm(N, 0, 0.3979)
y2 := yr + ε2
ε3 := rnorm(N, 0, 0.3981)
y3 := yr + ε3
ε4 := rnorm(N, 0, 0.3982)
y4 := yr + ε3
y1 := READFILE("Z:\labs\11\data\y1.dat", "delimited")
y2 := READFILE("Z:\labs\11\data\y2.dat", "delimited")
y3 := READFILE("Z:\labs\11\data\y3.dat", "delimited")
y4 := READFILE("Z:\labs\11\data\y4.dat", "delimited")
sA(yt, yr, N) :=
    A ← 0
    for i ∈ 1 .. N
        A ← if(|yt[i] - yr[i]| ≤ σ, A + 1, A)
    A/N*100
yr = [4.05876; 4.2627; 4.46664; 4.67058; 4.87452; 5.07845; 5.28239; 5.48633; 5.69027; 5.89421; 6.09815; 6.30209; 6.50603; 6.70997; 6.91391]
y1 = [4.83709; 4.25611; 4.20932; 5.01369; 4.36967; 4.40384; 6.21047; 5.13529; 5.79519; 5.57065; 5.81851; 5.81175; 6.46968; 6.83081; 7.07434]
ε1 = [-0.174623; -0.270268; -0.188273; -0.378493; -0.670565; 0.0173163; -0.0479886; 0.221346; 0.871892; 0.321715; 0.391889; 0.342995; 0.364212; 0.26772; -0.415428]
sA(y1, yr, N) = 66.6667
sA(y3, yr, N) = 66.6667
sA(y2, yr, N) = 66.6667
sA(y4, yr, N) = 66.6667
sB(yt, yr, N) :=
    B ← 0
    for i ∈ 1 .. N
        B ← if(|yt[i] - yr[i]| ≤ 2*σ, B + 1, B)
    B/N*100
sB(y1, yr, N) = 93.3333
sB(y3, yr, N) = 93.3333
sB(y2, yr, N) = 93.3333
sB(y4, yr, N) = 93.3333
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yr1[i] := intercept(x, y1) + slope(x, y1)*x[i]
yr2[i] := intercept(x, y2) + slope(x, y2)*x[i]
yr3[i] := intercept(x, y3) + slope(x, y3)*x[i]
yr4[i] := intercept(x, y4) + slope(x, y4)*x[i]
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n := 4
NT := N*n
NT = 60  # Адекватность модели:
α := 0.05
qvF := qF(1 - α, 2, NT - 2)
qvF = 3.15593
yS := stack(y1, y2, y3, y4)
yrS := stack(yr, yr, yr, yr)
ryS := stack(yr1, yr2, yr3, yr4)
sm2 := 1/(NT - 2)*sum((yS[j] - yrS[j])^2, j = 1 .. NT)
sm2 = 0.177176
sy2 := 1/(NT - n)*sum((yS[j] - ryS[j])^2, j = 1 .. NT)
sy2 = 0.173475
f := sm2/sy2
f = 1.02134
sm2 := sum((y1[i] - yr[i])^2 + (y2[i] - yr[i])^2 + (y3[i] - yr[i])^2 + (y4[i] - yr[i])^2, i = 1 .. N)/(NT - 2)
sm2 = 0.177176
sy2 := sum((y1[i] - yr1[i])^2 + (y2[i] - yr2[i])^2 + (y3[i] - yr3[i])^2 + (y4[i] - yr4[i])^2, i = 1 .. N)/(NT - n)
sy2 = 0.173475
