ORIGIN := 0
A := 4
B := 140
C := 7
D := 2
E := 60
S(Q) := Q^2/C + Q/D + E
D(Q) := -A*Q + B
Given
S(Q) - D(Q) == 0
sqrt(12929)/4 - 63/4 = 12.6764
Find(Q) → [sqrt(12929)/4 - 63/4, -sqrt(12929)/4 - 63/4] = [12.6764, -44.1764]
D(12.67644) = 89.2942
-sqrt(12929)/4 - 63/4 = -44.1764
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P[E] := 89.29424
P0 := 140
t := 0 .. 25
P[t] := (P0 - P[E])*(-E/B)^t + P[E]
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P = [
    140; 67.5632; 98.6075; 85.3028; 91.0048; 88.5611; 89.6084; 89.1596; 89.3519; 89.2695
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]
Q2[t] := D(Q) == P[t] solve, Q → 35 - [
    140.0; 67.5632; 98.6075428571; 85.3028244898; 91.0048466472; 88.5611228655; 89.6084330577; 89.1595858324; 89.351948929; 89.2695076019
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][t]/4
t2 := 0 .. 10
Q3[t2 + 1] := Q2[ceil(t2/2)]
P2[t2] := P[ceil(t2/2)]
P = [
    140; 67.5632; 98.6075; 85.3028; 91.0048; 88.5611; 89.6084; 89.1596; 89.3519; 89.2695
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]
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P2 = [140; 67.5632; 67.5632; 98.6075; 98.6075; 85.3028; 85.3028; 91.0048; 91.0048; 88.5611; 88.5611]
Q2 = [0; 18.1092; 10.3481; 13.6743; 12.2488; 12.8597; 12.5979; 12.7101; 12.662; 12.6826; 12.6738; 12.6776; 12.676; 12.6766; 12.6764; 12.6765; 12.6764; 12.6764; 12.6764; 12.6764; 12.6764; 12.6764; 12.6764; 12.6764; 12.6764; 12.6764]
