ORIGIN := 1
α := 12
β := 4
γ := 2
D0(x, γ) := α*x*(x + β)/(x^2 + γ)
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D0(10, γ + 1) = 16.3107
D0(10000, γ) = 12.0048
D0(10000, γ - 1) = 12.0048
D0(x, β) := α*x*(x + β)/(x^2 + γ)
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D0(10000, β + 1) = 12.006
D0(10000, β) = 12.0048
D0(10000, β - 1) = 12.0036
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D0(x, α) := α*x*(x + β)/(x^2 + γ)
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D0(10000, α + 1) = 13.0052
D0(10000, α) = 12.0048
D0(10000, α - 1) = 11.0044
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