ORIGIN := 1
a := 4
b := 3.5
c := 4
d := 4
F(t, x) := [(a - b*x[2])*x[1]; (-c + d*x[1])*x[2]]
x := [2; 1.6]
X1 := rkfixed(x, 0, 10, 400, F)
x := [2; 1]
X2 := rkfixed(x, 0, 10, 400, F)
X1 =  # no stored result
x := [3; 1]
X3 := rkfixed(x, 0, 10, 400, F)
x := [3; 3]
X4 := rkfixed(x, 0, 10, 400, F)
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max(X4[:, 2]) = 3.92237
max(X4[:, 3]) = 4.48134
max(X3[:, 2]) = 3.01275
max(X3[:, 3]) = 3.44318
max(X2[:, 2]) = 2.01698
max(X2[:, 3]) = 2.30505
max(X1[:, 2]) = 2.12338
max(X1[:, 3]) = 2.42673
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