ORIGIN := 1
a := 4
b := 3.5
c := 4
d := 4
α := 0.1
F(t, x) := [(a - b*x[2])*x[1] - α*x[1]^2; (-c + d*x[1])*x[2] - α*x[2]^2]
x := [2; 1.6]
X1 := rkfixed(x, 0, 10, 400, F)
x := [2; 1]
X2 := rkfixed(x, 0, 10, 400, F)
x := [3; 1]
X3 := rkfixed(x, 0, 10, 400, F)
X1 =  # no stored result
x := [3; 3]
X4 := rkfixed(x, 0, 10, 400, F)
max(X4[:, 2]) = 3.36933
max(X4[:, 3]) = 4.29914
max(X3[:, 2]) = 3
max(X3[:, 3]) = 3.18583
max(X2[:, 2]) = 2.00615
max(X2[:, 3]) = 2.1462
max(X1[:, 2]) = 2
max(X1[:, 3]) = 2.31184
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X4 =  # no stored result
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