ORIGIN := 1
a := 4
b := 3.5
c := 4
d := 4
α := -0.312
F(t, x) := [(a - b*x[2])*x[1] - α*x[1]^2; (-c + d*x[1])*x[2] - α*x[2]^2]
x := [2; 1.6]
X1 := rkfixed(x, 0, 10, 400, F)
x := [2; 1]
X2 := rkfixed(x, 0, 5, 400, F)
x := [3; 1]
X3 := rkfixed(x, 0, 8, 400, F)
X1 =  # no stored result
x := [3; 3]
X4 := rkfixed(x, 0, 3, 400, F)
max(X4[:, 2]) = 8.51767
max(X4[:, 3]) = 22.8154
max(X3[:, 2]) = 6.51222
max(X3[:, 3]) = 10.6116
max(X2[:, 2]) = 7.73149
max(X2[:, 3]) = 14.9307
max(X1[:, 2]) = 7.27028
max(X1[:, 3]) = 12.313
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X4 =  # no stored result
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