ORIGIN := 1
i := 1 .. 12
D1 := [1, 904.3; 3, 910.2; 1, 936.6; 2, 928.8; 1, 935.0; 2, 941.2]
D2 := [1, 947.4; 4, 953.6; 1, 919.8; 1, 966.0; 2, 972.2; 1, 978.4]
D := stack(D1, D2)
D = [
    1, 904.3;
    3, 910.2;
    1, 936.6;
    2, 928.8;
    1, 935;
    2, 941.2;
    1, 947.4;
    4, 953.6;
    1, 919.8;
    1, 966;
    2, 972.2;
    1, 978.4
]
n := sum(D[i, 1], i = 1 .. 12)
n = 20
Mx := (1/n)*sum(D[i, 1]*D[i, 2], i = 1 .. 12)
Mx = 940.845
Dx := (1/(n - 1))*sum(D[i, 1]*(D[i, 2] - Mx)^2, i = 1 .. 12)
Dx = 507.449
Dx1 := (1/n)*sum(D[i, 1]*(D[i, 2] - Mx)^2, i = 1 .. 12)
Dx1 = 482.076
# Вывод :
# Объем выборки n = 20 характеризуется следующими значениями:
# -Точечная оценка математического ожидания Mx = 940.845
# -Точечная несмещенная оценка дисперсии Dx = 507.448921
# -Точечная смещенная оценка дисперсии Dx1 = 482.076475
