ORIGIN := 1
k := 1 .. 30000
P[k] := rbinom(1, 10*k, 0.13)[1]/(10*k)
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P[k] =  # no stored result
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x := 143860
x = 143860
# Вывод:
# При объема выборки больше 143860 и при заданном параметре вероятности p = 0.13 все последующие значения вероятности попадают в 5% погрешность на интервале (0.12675,0.13325).
