ORIGIN := 1
k := 1 .. 20
θ := 3.5
T1[k] := (2/(10*k))*sum(runif(10*k, 0, θ))
T1[19] = 3.20878
T3[k] := ((10*k + 1)/(10*k))*max(runif(10*k, 0, θ))
T3[19] = 3.50714
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T1 = [2.36605; 3.99595; 3.45822; 3.67061; 3.56174; 3.07484; 3.20288; 3.45901; 3.60027; 3.60677; 3.67675; 3.24905; 3.44051; 3.74382; 3.64048; 3.32668; 3.44959; 3.55053; 3.20878; 3.57064]
T3 = [3.48437; 3.66763; 3.5749; 3.56005; 3.56289; 3.33001; 3.53491; 3.51706; 3.47649; 3.52282; 3.52525; 3.52105; 3.49655; 3.51598; 3.52247; 3.51864; 3.51708; 3.46103; 3.50714; 3.49747]
p1 := |1 - T1[19]/θ|*100
p3 := |1 - T3[19]/θ|*100
p1 = 8.32044
p3 = 0.204052
# Вывод:
# При объеме выборки 190, оцениваемое значение θ=3.5 методом T1 имеет точность P1 = 8.32%, методом T3 имеет точность P3 = 0.204%. Следовательно, метод T3 точнее метода T1.
