ORIGIN := 1
N := 7
k := 50*N
p := 0.1*N
P := rpois(k, p)
LnL(λ) := (-k*λ + sum(P[i], i = 1 .. k)*ln(λ)) - ln(product(P[i]!, i = 1 .. k))
LnL(p) = -379.415
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P = [
    0; 0; 1; 1; 1; 0; 0; 1; 0; 1
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]
n := 10*N, 20*N .. 50*N
λ(n) := 1/n*sum(P[i], i = 1 .. n)
n = [70; 140; 210; 280; 350]
λ(n) = [0.657143; 0.671429; 0.647619; 0.685714; 0.7]
λ(210) = 0.647619
λ(350) = 0.7
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# Оценка максимального правдоподобия λ=0.7 при объёме выборки n=210 равна 0.647619, а при объеме выборки n=350 равна 0.7. Следовательно, при увеличении объема выборки полученные оценки стремятся к заданному значению параметра λ.
