ORIGIN := 1
N := 7
k := 50*N
p := 0.1*N
P := rexp(k, p)
LnL(λ) := k*ln(λ) - λ*sum(P[i], i = 1 .. k)
P = [
    3.58153; 0.223257; 1.68477; 1.06956; 2.35836; 0.00716711; 0.620612; 2.49703; 1.84435; 0.250923
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]
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LnL(p) = -471.125
n := 10*N, 20*N .. 50*N
λ(n) := n/sum(P[i], i = 1 .. n)
λ(210) = 0.688645
λ(350) = 0.707502
n = [70; 140; 210; 280; 350]
λ(n) = [0.603153; 0.659035; 0.688645; 0.681463; 0.707502]
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# Оценка максимального правдоподобия λ=0.7 при объёме выборки n=210 равна 0.688645, а при объеме выборки n=350 равна 0.707502. Следовательно, при увеличении объема выборки полученные оценки стремятся к заданному значению параметра λ.
