ORIGIN := 1
n := 200
θ[1] := 4
θ[2] := 4.5
ξ := runif(n, 0, 1)
θ := θ[1]/θ[2]
θ = 0.888889
FL(x, θ) :=
    (1/2*exp(x - θ)) if -∞ < x ≤ θ
    (1 - 1/2*exp(-x + θ)) if θ < x < ∞
f(x, θ) :=
    (θ + ln(2*x)) if 0 ≤ x ≤ 1/2
    (θ - ln(2*(1 - x))) if 1/2 < x < 1
p(x, θ) := 1/2*exp(-|x - θ|)
i := 1 .. n
fx[i] := f(ξ[i], θ)
X := sort(fx)
xmax := max(X)
xmin := min(X)
R := xmax - xmin
ξ = [
    0.00126842; 0.193323; 0.585006; 0.350308; 0.822838; 0.174129; 0.710495; 0.303986; 0.0914113; 0.147313
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]
fx = [
    -5.08795; -0.0613567; 1.07523; 0.533094; 1.92643; -0.165923; 1.43533; 0.391263; -0.81035; -0.333157
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]
xmax = 5.93899
xmin = -5.08795
R = 11.0269
m := 11
j := 1 .. m
k := 1 .. m - 1
Δ := R/m
Δ = 1.00245
x[j] := xmin + Δ/2*(2*j - 1)
f1 := hist(x, X)
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x = [-4.58672; -3.58427; -2.58183; -1.57938; -0.576929; 0.425519; 1.42797; 2.43042; 3.43286; 4.43531; 5.43776]
f1 = [0; 4; 2; 13; 45; 79; 42; 9; 2; 1]
X = [
    -5.08795; -4.84373; -3.54882; -3.14903; -3.13712; -2.63904; -2.01167; -1.99917; -1.30166; -1.28169
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]
a[j] := xmin + Δ*(j - 1)
b[j] := a[j] + Δ
F[k] := sum(f1[j], j = 1 .. k)
FT[j] := FL(x[j], θ)
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a = [-5.08795; -4.0855; -3.08305; -2.0806; -1.07815; -0.0757051; 0.926743; 1.92919; 2.93164; 3.93409; 4.93654]
b = [-4.0855; -3.08305; -2.0806; -1.07815; -0.0757051; 0.926743; 1.92919; 2.93164; 3.93409; 4.93654; 5.93899]
# Вероятность теоретическая равна  0,49592;  вероятность практическая равна 0.69979.
θest1 := X[94]
θest2 := X[95]
θest1 = 0.882508
θest2 = 0.890715
θ2est1 := 1/n*sum(|X[i] - θest1|, i = 1 .. n)
θ2est2 := 1/n*sum(|X[i] - θest2|, i = 1 .. n)
F = [0; 4; 6; 19; 64; 143; 185; 194; 196; 197]
FT = [0.00209383; 0.00570558; 0.0155474; 0.0423658; 0.115444; 0.31458; 0.708357; 0.892973; 0.960723; 0.985586; 0.99471]
θ2est1 = 0.938692
θ2est2 = 0.9382
# Таким образом, для объема выборки n=200 значений случайной величины, имеющей равномерное распределение Лапласа с параметрами ϴ_1=4 и ϴ_2=4.5 (ϴ=0.888889), получены две оценки максимального правдоподобия:
# Если в качестве оценки выбрано значение X_99 , то ϴtest1=0.923729 и ϴtest2=0.936978;
# Если в качестве оценки выбрано значение X_100, то ϴ2test1=0.929453 и ϴ2test2=0.93692.
# Кроме того, для графиков эмпирической функции распределения Fk и теоретической функции распределения FTj получили вероятность теоретическую равную 0,4959 и практическую равную 0.69979..
