ORIGIN := 1
i := 1 .. 12
D := [
    3, 904.3;
    2, 910.2;
    1, 916.6;
    7, 928.8;
    8, 935.0;
    2, 941.2;
    4, 947.4;
    2, 953.6;
    4, 959.8;
    1, 966.0;
    1, 972.2;
    1, 978.4
]
n := sum(D[i, 1], i = 1 .. 12)
n = 36
Mx := 1/n*sum(D[i, 1]*D[i, 2], i = 1 .. 12)
Mx = 937.958
Dx := 1/(n - 1)*sum(D[i, 1]*(D[i, 2] - Mx)^2, i = 1 .. 12)
Dx = 354.929
t := qt(1 - 0.05/2, n)
t = 2.02809
xl := Mx - t*sqrt(Dx/n)
xl = 931.59
xr := Mx + t*sqrt(Dx/n)
xr = 944.326
hl := qchisq(0.1/2, n - 1)
hl = 22.465
hr := qchisq(1 - 0.1/2, n - 1)
hr = 49.8018
dl := Dx*(n - 1)/hr
dl = 249.439
dr := Dx*(n - 1)/hl
dr = 552.972
# Математическое ожидание Мх=937.958333;
#
# Несмещенная дисперсия Dx=354.929357;
#
# Доверительный интервал математического ожидания при доверительной вероятности 95% равен промежутку(931.590264, 944.326403);
#
# Доверительный интервал для дисперсии при доверительной вероятности 90% равен промежутку (249.439093, 552.972138)
