ORIGIN := 1
α := 0.1
λ := 3
N := 500
P := rpois(N, λ)
Pmax := max(P)
Pmin := min(P)
R := Pmax - Pmin
PS := sort(P)
Pmax = 9
Pmin = 0
R = 9
m := 9
Δ := R/m
j := 1 .. m
k := 1 .. m - 1
p[j] := Pmin + Δ/2*(2*j - 1)
f := hist(p, PS)
P = [
    0; 2; 3; 1; 2; 3; 1; 8; 4; 4
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]
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xα := qnorm(1 - α/2, 0, 1)
xα = 1.64485
n := 10 .. 500
λest(n) := 1/n*sum(P[j], j = 1 .. n)
λest(50) = 3
λest(100) = 2.77
λleft(n) := (sqrt(λest(n)) - xα/(2*sqrt(n)))^2
λright(n) := (sqrt(λest(n)) + xα/(2*sqrt(n)))^2
λleft(n) = [
    1.99726; 2.20249; 2.23394; 2.26187; 2.28689; 2.30949; 2.38515; 2.50525; 2.61345; 2.52292
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]
λest(n) = [
    2.8; 3; 3; 3; 3; 3; 3.0625; 3.17647; 3.27778; 3.15789
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]
λright(n) = [
    3.73801; 3.92049; 3.87879; 3.84219; 3.80973; 3.78069; 3.8244; 3.92727; 4.01726; 3.86407
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]
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λleft(500) = 2.81131
λright(500) = 3.0634
# Таким образом, для выборки из 500 значений случайной величины, имеющей пуассоновское распределение с параметром λ = 3, получен следующий 90 %-ный доверительный интервал для параметра λ: (2.811309, 3.063396 ).
