ORIGIN := 1
α := 0.1
n := 40
m := 22
xα := qnorm(1 - α/2, 0, 1)
xα = 1.64485
p := m/n
p = 0.55
pleft := sin((π/2 - acos(sqrt(p))) - xα/(2*sqrt(n)))^2
pleft = 0.420387
pright := sin((π/2 - acos(sqrt(p))) + xα/(2*sqrt(n)))^2
pright = 0.67625
n := 10 .. n
m(n) := rbinom(1, n, p)[1]
p1(n) := m(n)/n
m(n) = [
    5; 5; 4; 10; 10; 11; 8; 8; 12; 7
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]
p1(n) = [
    0.6; 0.363636; 0.583333; 0.615385; 0.571429; 0.333333; 0.6875; 0.529412; 0.666667; 0.578947
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]
pleft(n) := sin((π/2 - acos(sqrt(p1(n)))) - xα/(2*sqrt(n)))^2
pright(n) := sin((π/2 - acos(sqrt(p1(n)))) + xα/(2*sqrt(n)))^2
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# Для числа испытаний n=40 и m=22 успешных испытаний получен 90%-ный доверительный интервал (0.420387, 0.67625) для вероятности p = 0.55.
