ORIGIN := 1
α := 0.1
n := 15
xα := qnorm(1 - α/2, 0, 1)
xα = 1.64485
XY := [
    -0.564, -0.519, 3.022, -1.669, -0.446, -2.146, -0.498, -3.789, 2.741, -1.77, -3.803, -1.949, 1.352, 1.143, -0.883;
    18.648, -29.637, 11.949, -4.221, 8.611, 10.646, -0.823, 7.915, -12.198, 24.134, 12.219, -0.105, 6.862, -11.786, -12.537
]
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Xmean := 1/n*sum(XY[1, i], i = 1 .. n)
Ymean := 1/n*sum(XY[2, i], i = 1 .. n)
Xmean = -0.651867
Ymean = 1.97847
m := 1/n*sum((XY[1, i] - Xmean)*(XY[2, i] - Ymean), i = 1 .. n)
m = -6.96283
σ2x := 1/n*sum((XY[1, i] - Xmean)^2, i = 1 .. n)
σ2y := 1/n*sum((XY[2, 1] - Ymean)^2, i = 1 .. n)
σ2x = 3.89078
σ2y = 277.873
k := m/sqrt(σ2x*σ2y)
k = -0.21176
kleft := tanh(atanh(k) - xα/sqrt(n - 3))
kleft = -0.59788
kright := tanh(atanh(k) + xα/sqrt(n - 3))
kright = 0.254122
k := (sum(XY[1, i]*XY[2, i], i = 1 .. n) - 1/n*sum(XY[1, i], i = 1 .. n)*sum(XY[2, i], i = 1 .. n))/sqrt((sum(XY[1, i]^2, i = 1 .. n) - 1/n*sum(XY[1, i], i = 1 .. n)^2)*(sum(XY[2, i]^2, i = 1 .. n) - 1/n*sum(XY[2, i], i = 1 .. n)^2))
k = -0.258249
kmin := tanh(atanh(k) - xα/sqrt(n - 3))
kmin = -0.628577
kmax := tanh(atanh(k) + xα/sqrt(n - 3))
kmax = 0.207538
# Для данной двумерной случайной величины XY получен коэффициент корреляции k=-0.21176 с доверительным интервалом 90%  (−0.59788, 0.254122).
# Коэффициент корреляции имеет слабую обратную зависимость.
