ORIGIN := 1
# Альтернативная гипотеза H1: a≠a0.
N := 100
a := 1.5
σ := 0.1
α := 0.1
ξ := rnorm(N, a, σ)
Xmean := mean(ξ)
Xmean = 1.48495  # Гипотеза H0: среднее значение a0 = 1.494648 является оценкой идеального значения a = 1.5 с доверительной вероятностью 90%.
Xright := qnorm(1 - α/2, 0, 1)
Xright = 1.64485
Xleft := -Xright
Xleft = -1.64485
ϕ[1] := (Xmean - a)/sqrt(σ^2/N)
ϕ[1] = -1.50453
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# Так как ф1 = -0.535196 лежит в интервале  (Xleft = 1.644854, Xright = -1.644854), то гипотеза H1 опровергается и гипотеза Н0 принимается.
N := 100
a := 1.5
σ := 0.1
α := 0.05  # Альтернативная гипотеза H2: a>a0.
X := rnorm(N, a, σ)
Xmean := mean(X)
Xmean = 1.51162  # Гипотеза H0: среднее значение a0 = 1.486092 является оценкой идеального значения a = 1.5 с доверительной вероятностью 95%.
Xright := qnorm(1 - α, 0, 1)
Xright = 1.64485
ϕ[1] := (Xmean - a)/sqrt(σ^2/N)
ϕ[1] = 1.16204
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# Так как ф1 < Xright (-1.390793 < 1.644854), то альтернативная гипотеза H2 опровергается и гипотеза Н0 принимается.
N := 100
a := 1.5
σ := 0.1
α := 0.05
# Альтернативная гипотеза  H3: a < a0.
X := rnorm(N, a, σ)
Xmean := mean(X)
Xmean = 1.47545
Xright := qnorm(1 - α, 0, 1)
Xleft := -Xright
Xleft = -1.64485
# Гипотеза H0: среднее значение a0 = 1.501739 является оценкой идеального значения a = 1.5 с доверительной вероятностью 95%.
ϕ[1] := (Xmean - a)/sqrt(σ^2/N)
ϕ[1] = -2.45473
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# Так как ф1 > Xleft (0.173885 > -1.644854), то альтернативная гипотеза H3 опровергается и гипотеза Н0 принимается.
