ORIGIN := 1
N := 15
i := 1 .. N
y := conj(READFILE("data6.txt", "delimited"))
x[i] := -0.9 + (i - 1)*0.1
a0 := intercept(x, y)
a0 = 5.89421
a1 := slope(x, y)
a1 = 2.03939
yr[i] := a0 + a1*x[i]
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y = [3.911; 3.893; 4.704; 4.993; 4.935; 5.477; 5.384; 5.489; 5.202; 5.714; 6.524; 5.348; 6.516; 7.136; 7.069]
x = [-0.9; -0.8; -0.7; -0.6; -0.5; -0.4; -0.3; -0.2; -0.1; 0; 0.1; 0.2; 0.3; 0.4; 0.5]
Xmean := mean(x)
Xmean = -0.2
Ymean := mean(y)
Ymean = 5.48633
yr = [4.05876; 4.2627; 4.46664; 4.67058; 4.87452; 5.07845; 5.28239; 5.48633; 5.69027; 5.89421; 6.09815; 6.30209; 6.50603; 6.70997; 6.91391]
s2 := 1/(N - 2)*sum((y[k] - yr[k])^2, k = 1 .. N)
s2 = 0.158447
α := 0.1
t := qt(1 - α/2, N - 2)
t = 1.77093
a0left := a0 - t*sqrt(s2)*sqrt(1/N + Xmean^2/sum((x[k] - Xmean)^2, k = 1 .. N))  # доверительный интервал для a_0
a0left = 5.69365
a0right := a0 + t*sqrt(s2)*sqrt(1/N + Xmean^2/sum((x[k] - Xmean)^2, k = 1 .. N))
a0right = 6.09478
# доверительный интервал для a_1
a1left := a1 - t*sqrt(s2)/sqrt(sum((x[k] - Xmean)^2, k = 1 .. N))
a1right := a1 + t*sqrt(s2)/sqrt(sum((x[k] - Xmean)^2, k = 1 .. N))
a1left = 1.61812
a1right = 2.46067
Xleft := qchisq(α/2, N - 2)  # Доверительный интервал для дисперсии
Xleft = 5.89186
Xright := qchisq(1 - α/2, N - 2)
Xright = 22.362
σleft := (N - 2)*s2/Xright
σleft = 0.0921122
σright := (N - 2)*s2/Xleft
σright = 0.349603
# Построение доверительного коридора i = 1..N
yleft[i] := a0 + a1*x[i] - t*sqrt(s2)*sqrt(1/N + (x[i] - Xmean)^2/sqrt(sum((x[k] - Xmean)^2, k = 1 .. N)))
yright[i] := a0 + a1*x[i] + t*sqrt(s2)*sqrt(1/N + (x[i] - Xmean)^2/sqrt(sum((x[k] - Xmean)^2, k = 1 .. N)))
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# Построение доверительной области
f := qF(1 - α, 2, N - 2)
f = 2.76317
yleft[i] := a0 + a1*x[i] - 2*f*sqrt(s2)*sqrt(1/N + (x[i] - Xmean)^2/sqrt(sum((x[k] - Xmean)^2, k = 1 .. N)))
yright[i] := a0 + a1*x[i] + 2*f*sqrt(s2)*sqrt(1/N + (x[i] - Xmean)^2/sqrt(sum((x[k] - Xmean)^2, k = 1 .. N)))
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