ORIGIN := 1
T := 7
Q := 21
d := 5
a := 200*T + Q
a = 1421
m := 10^d
L := m/20
m = 100000
L = 5000
N := 300
i := 1 .. N
x[1] := 12347
x[i + 1] := mod(a*x[i], m)
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xp[i] := x[i]/m
xmin := min(xp)
xmax := max(xp)
R := xmax - xmin
R = 0.9898
k := 20
xSort := sort(xp)
Δ := R/k
j := 1 .. k
p[j] := xmin + Δ/2*(2*j - 1)
f := hist(p, xSort)
Pt := 1/k
Pt = 0.05
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p = [0.026815; 0.076305; 0.125795; 0.175285; 0.224775; 0.274265; 0.323755; 0.373245; 0.422735; 0.472225; 0.521715; 0.571205; 0.620695; 0.670185; 0.719675; 0.769165; 0.818655; 0.868145; 0.917635; 0.967125]
f = [20; 17; 12; 17; 12; 5; 15; 13; 18; 18; 16; 14; 13; 15; 10; 20; 14; 18; 17]
σ := 1/12
α := 0.05
Pmean := mean(f/N)
Pmean = 0.0498246
# Гипотеза H0: среднее значение Pmean = 0.049825 является оценкой идеального значения Pt = 0.5 с доверительной вероятностью 95%.
Pright := qnorm(1 - α/2, 0, 1)
φ := (Pmean - 1/k)/sqrt(σ^2/k)
Pleft := -Pright
Pleft = -1.95996
Pleft ≤ φ ≤ Pright = 1
φ = -0.00941502
Pright = 1.95996
# Критерий согласия φx=-9.415023*10-3 принадлежит области принятия (−1,959964;1,959964). Следовательно, подтверждается гипотеза H0.
# Вывод: практическая вероятность соответствует теоретической, следовательно проверка на равномерность пройдена.
l := floor(log(max(x), 2))
l = 16
Xn :=
    for i ∈ 1 .. N
        for j ∈ 1 .. l
            Xn[i, j] ← floor(mod(x[i]/2^(l - j), 2))
    Xn
s :=
    for i ∈ 1 .. N
        sum[i] ← sum(Xn[i, j], j = 1 .. l)
    sum
Xn =  # no stored result
v :=
    for j ∈ 1 .. l
        t[j] ← 0
        for i ∈ 1 .. N
            t[j] ← t[j] + 1 if j == s[i]
    t
j := 1 .. l
Pprx := v/N
Pt[j] := l!/(j!*(l - j)!)*0.5^l
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s = [
    7; 8; 5; 7; 9; 8; 7; 5; 12; 10
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]
v = [0; 0; 0; 0; 11; 25; 39; 59; 76; 40; 27; 13; 10; 0; 0; 0]
Pxmean := mean(Pprx)
Pxmean = 0.0625
Ptmean := mean(Pt)
Ptmean = 0.062499  # Критерий согласия φx=4.808329*10-5 принадлежит области принятия (−1.959964, 1.959964). Следовательно, подтверждается гипотеза H0.
Dx := 1/(l - 1)*sum((Pprx[j] - Pxmean)^2, j = 1 .. l)
Dx = 0.00629407
ϕx := (Pxmean - Ptmean)/sqrt(Dx/l)
ϕx = 4.80833e-5
α := 0.05
Xright := qnorm(1 - α/2, 0, 1)
Xright = 1.95996
Xleft := -Xright
Xleft = -1.95996
# Вывод: практическая вероятность соответствует теоретической, следовательно проверка на стохастичность пройдена.
τ := 5, 10 .. N - 5
β := 0.96
Dx(τ) := (1/(N - τ))*sum(x[i]^2, i = 1 .. N - τ) - 1/(N - τ)^2*sum(x[i], i = 1 .. N - τ)^2
x = [
    12347; 45087; 68627; 18967; 52107; 44047; 90787; 8327; 32667; 19807
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]
Dxτ(τ) := (1/(N - τ))*sum(x[i + τ]^2, i = 1 .. N - τ) - 1/(N - τ)^2*sum(x[i + τ], i = 1 .. N - τ)^2
Dx(τ) = [
    863114552; 859933139; 868372927; 860848843; 847825316; 845242441; 839308499; 845479392; 855183891; 854709700
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]
Dxτ(τ) = [
    872931455; 871332996; 870719889; 866927210; 875653415; 877220987; 885469951; 876293475; 883898446; 890269700
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]
Px(τ) := ((1/(N - τ))*sum(x[i]*x[i + τ], i = 1 .. N - τ) - 1/(N - τ)^2*sum(x[i], i = 1 .. N - τ)*sum(x[i + τ], i = 1 .. N - τ))/sqrt(Dx(τ)*Dxτ(τ))
Px(τ) = [
    -0.0412597; 0.110461; -0.0307239; -0.0229236; 0.0462172; -0.0283499; -0.138523; -0.0112995; 0.061777; -0.0167719
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]
s :=
    s ← 0
    sl ← 0
    for τ ∈ 5, 10 .. N - 5
        s ← if(|Px(τ)| ≤ β*sqrt(1/N), s + 1, s)
        sl ← sl + 1
    s/sl
s = 0.542373
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# Вывод: проверка на независимость пройдена, так как полученное значение s=54,2373% ≥ 50%.
