ORIGIN := 1
T := 87
Q := 21
d := 5
С := 7
a := 200*T + Q
a = 17421
m := 10^d
L := m/20
m = 100000
L = 5000
N := 300
i := 1 .. N
x[1] := 12347
x[i + 1] := mod(a*x[i] + С, m)
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xp[i] := x[i]/m
xmin := min(xp)
xmax := max(xp)
R := xmax - xmin
R = 0.99169
k := 20
xSort := sort(xp)
Δ := R/k
j := 1 .. k
p[j] := xmin + Δ/2*(2*j - 1)
f := hist(p, xSort)
Pt := 1/k
Pt = 0.05
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p = [0.0316823; 0.0812667; 0.130851; 0.180436; 0.23002; 0.279605; 0.329189; 0.378774; 0.428358; 0.477943; 0.527527; 0.577112; 0.626696; 0.676281; 0.725865; 0.77545; 0.825034; 0.874619; 0.924203; 0.973788]
f = [14; 12; 15; 17; 16; 18; 16; 16; 15; 17; 11; 16; 17; 16; 8; 17; 11; 15; 14]
σ := 1/12
α := 0.05
Pmean := mean(f/N)
Pmean = 0.0492982
# Гипотеза H0: среднее значение Pmean = 0.049298 является оценкой идеального значения Pt = 0.5 с доверительной вероятностью 95%.
Pright := qnorm(1 - α/2, 0, 1)
φ := (Pmean - 1/k)/sqrt(σ^2/k)
Pleft := -Pright
Pleft = -1.95996
Pleft ≤ φ ≤ Pright = 1
φ = -0.0376601
Pright = 1.95996
# Критерий согласия φ=-0.03766 принадлежит области принятия (−1.959964, 1.959964). Следовательно, подтверждается гипотеза H0.
# Вывод: практическая вероятность соответствует теоретической, следовательно проверка на равномерность пройдена.
l := floor(log(max(x), 2))
l = 16
Xn :=
    for i ∈ 1 .. N
        for j ∈ 1 .. l
            Xn[i, j] ← floor(mod(x[i]/2^(l - j), 2))
    Xn
s :=
    for i ∈ 1 .. N
        sum[i] ← sum(Xn[i, j], j = 1 .. l)
    sum
Xn =  # no stored result
v :=
    for j ∈ 1 .. l
        t[j] ← 0
        for i ∈ 1 .. N
            t[j] ← t[j] + 1 if j == s[i]
    t
j := 1 .. l
Pprx := v/N
Pt[j] := l!/(j!*(l - j)!)*0.5^l
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s = [
    7; 9; 7; 7; 8; 8; 10; 8; 7; 10
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]
v = [0; 0; 4; 5; 29; 31; 63; 54; 48; 35; 20; 8; 2; 0; 1; 0]
# Гипотеза H0: полученное среднее значение Pxmean=0.0625 является оценкой идеального Ptmean=0.062499 с доверительной вероятностью 95%.
Pxmean := mean(Pprx)
Pxmean = 0.0625
# Критерий согласия φx=5.259775*10-5 принадлежит области принятия (−1.959964, 1.959964). Следовательно, подтверждается гипотеза H0.
Ptmean := mean(Pt)
Ptmean = 0.062499
Dx := 1/(l - 1)*sum((Pprx[j] - Pxmean)^2, j = 1 .. l)
Dx = 0.00526
ϕx := (Pxmean - Ptmean)/sqrt(Dx/l)
ϕx = 5.25978e-5
α := 0.05
Xright := qnorm(1 - α/2, 0, 1)
Xright = 1.95996
Xleft := -Xright
Xleft = -1.95996
# Вывод: практическая вероятность соответствует теоретической, следовательно проверка на стохастичность пройдена.
τ := 5, 10 .. N - 5
β := 0.96
Dx(τ) := (1/(N - τ))*sum(x[i]^2, i = 1 .. N - τ) - 1/(N - τ)^2*sum(x[i], i = 1 .. N - τ)^2
x = [
    12347; 97094; 74581; 75608; 66975; 71482; 87929; 11116; 51843; 56910
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]
Dxτ(τ) := (1/(N - τ))*sum(x[i + τ]^2, i = 1 .. N - τ) - 1/(N - τ)^2*sum(x[i + τ], i = 1 .. N - τ)^2
Dx(τ) = [
    812924602; 817713573; 802516608; 797270136; 798047901; 809802479; 805010267; 802564394; 803454753; 804917934
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]
Dxτ(τ) = [
    805848782; 807440224; 812941602; 818918730; 821713868; 820614682; 826934297; 824775981; 833108414; 821365234
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]
Px(τ) := ((1/(N - τ))*sum(x[i]*x[i + τ], i = 1 .. N - τ) - 1/(N - τ)^2*sum(x[i], i = 1 .. N - τ)*sum(x[i + τ], i = 1 .. N - τ))/sqrt(Dx(τ)*Dxτ(τ))
Px(τ) = [
    -0.00057998; 0.0504137; 0.103673; 0.0425274; -0.0444472; 0.0238671; -0.0356743; 0.0148201; -0.0455819; 0.0665313
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]
s :=
    s ← 0
    sl ← 0
    for τ ∈ 5, 10 .. N - 5
        s ← if(|Px(τ)| ≤ β*sqrt(1/N), s + 1, s)
        sl ← sl + 1
    s/sl
s = 0.576271
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# Вывод: полученное значение s=57.6271% ≥ 50%, следовательно проверка на независимость пройдена.
