ORIGIN := 1
T := 7
Q := 21
d := 5
a := 200*T + Q
a = 1421
m := 10^d
L := m/20
m = 100000
L = 5000
N := 300
i := 1 .. N
x[1] := 12347
x[i + 1] := mod(a*x[i], m)
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α := 0.1
M := 55
Dx := M*0.2
Dx = 11
k := 20
f(x) := dnorm(x, M, Dx)
a[1] := qnorm(α/2, M, Dx)
a[1] = 36.9066
a[k + 1] := qnorm(1 - α/2, M, Dx)
a[k + 1] = 73.0934
P := integral(f(x), x = a[1] .. a[k + 1])
P = 0.9
g = 9.80665 m/s^2
j := 1 .. k
g := 1 .. k + 1
a[j + 1] := root(integral(f(x), x = a[j] .. M) - P/k, M)
t := 20 .. 90
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a = [36.9066; 40.5836; 43.1165; 45.1388; 46.8727; 48.4246; 49.8553; 51.2036; 52.497; 53.7566; 55; 56.2434; 57.503; 58.7964; 60.1447; 61.5754; 63.1273; 64.8612; 66.8835; 69.4164; 73.0934]
X[i] := x[i]/m
y[j, i] := a[j] + (a[j + 1] - a[j])*X[i]
a[1] = 36.9066
a[k + 1] = 73.0934
ymax := max(y)
ymax = 73.0635
ymin := min(y)
ymin = 36.9142
R := ymax - ymin
R = 36.1493
s := 36
y =  # no stored result
Δ := R/s
Δ = 1.00415
j := 1 .. s
p[j] := ymin + Δ/2*(2*j - 1)
h := hist(p, y)
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# гипотеза H0: среднее значение Ymean=55.022502 является оценкой идеального значения M=55 с доверительной вероятностью 90%.
Ymean := mean(y)
Ymean = 55.0225
α := 0.1
Xright := qnorm(1 - α/2, 0, 1)
Xright = 1.64485
Xleft := -Xright
Xleft = -1.64485
ϕ1 := (Ymean - M)/sqrt(Dx^2/N)
ϕ1 = 0.0354317
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# Вывод: гипотеза H0 с доверительной вероятностью 90% принимается, так как критерий согласия Стьюдента ϕ1 = 0.035432 попадает в доверительный интервал (−1.644854, 1.644854).
